log data/log.setup_${GEOMETRY}

units metal
boundary p p p
atom_style atomic

read_data orthogonal_alpha_quartz.data
# read_data ./betacristobalite.data
include in.potential_etc
include in.common_variables
replicate $(ceil(v_Lx/v_a)+v_sphere_spacing) $(ceil(v_Ly/v_b)+v_sphere_spacing) $(round(v_total_height/v_c))

include in.common_regions_${GEOMETRY}
include in.common_groups

group to_be_deleted subtract all bottom_layer top_layer bottom_sphere top_sphere
#group to_be_deleted union outside_cylinder

delete_atoms group to_be_deleted

write_restart data/restart.setup_${GEOMETRY}
write_data data/data.setup_${GEOMETRY}
